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/BATCH
/COM,ANSYS RELEASE Release 19.0      BUILD 19.0      UP20171214       20:54:04
/input,menust,tmp,''
/GST,ON
/PLO,INFO,3
/GRO,CURL,ON
/CPLANE,1
WPSTYLE,,,,,,,,0
/prep7
et,1,beam188
keyopt,1,3,3
mp,ex,1,2.1e5
mp,nuxy,1,0.285
sectype,1,beam,rect
secdata,100,40
sectype,2,beam,ctube
secdata,5,10
n,1,-2000
n,2,
n,3,,,
n,4,,1000,
n,5,2000
e,1,2
e,2,5
secnum,2
e,3,4
cp,1,ux,2,3
cp,2,uy,2,3
cp,3,uz,2,3
cp,4,rotx,2,3
cp,5,roty,2,3
finish
/solv
d,1,all
d,5,all
d,4,ux,,
d,4,uy,,
f,2,fy,-50000
solv
finish
/post1
prnsol,u,sum
/eshape,1
plnsol,u,y
finish
FINISH
! /EXIT,NOSAV
/BATCH
/COM,ANSYS RELEASE Release 19.0      BUILD 19.0      UP20171214       21:15:51
/input,menust,tmp,''
/GST,ON
/PLO,INFO,3
/GRO,CURL,ON
/CPLANE,1
WPSTYLE,,,,,,,,0
/prep7
et,1,beam188
keyopt,1,3,3
mp,ex,1,2.1e5
mp,nuxy,1,0.285
sectype,1,beam,rect
secdata,100,40
sectype,2,beam,ctube
secdata,5,10
n,1,-2000
n,2,
n,3,
n,4,,2000
n,5,2000
n,6,-1000
n,7,1000
e,1,6
e,6,2
e,2,7
e,7,5
secnum,2
e,3,4
cp,1,ux,2,3
cp,2,uy,2,3
cp,3,uz,2,3
cp,4,rotx,2,3
cp,5,roty,2,3
finish
/solv
d,1,all
d,5,all
d,4,ux,,
d,4,uy,,
f,6,fy,-1000
f,7,fy,-1000
solv
finish
/post1
prnsol,u,sum
/eshape,1
plnsol,u,y
finish
RESUME
/COM,ANSYS RELEASE Release 19.0      BUILD 19.0      UP20171214       21:51:42
/prep7
et,1,beam188
keyopt,1,3,3
mp,ex,1,2.1e5
mp,nuxy,1,0.285
sectype,1,beam,rect
secdata,100,40
sectype,2,beam,ctube
secdata,5,10
n,1,-2000
n,2,
n,3,
n,4,,2000
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secnum,2
e,3,4
cp,1,ux,2,3
cp,2,uy,2,3
cp,3,uz,2,3
cp,4,rotx,2,3
cp,5,roty,2,3
finish
/solv
d,1,all
d,5,all
d,4,ux,,
d,4,uy,,
f,6,fy,-1000
f,7,fy,-1000
solv
finish
/post1
prnsol,u,sum
/eshape,1
plnsol,u,y
finish
/POST1
! /batch
FINISH
/PREP7
et,1,beam188
keyopt,1,3,3
mp,ex,1,2.1e5
mp,nuxy,1,0.285
sectype,1,beam,rect
secdata,100,40
sectype,2,beam,ctube
secdata,5,10
n,1,-2000
n,2,
n,3,
n,4,,2000
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secnum,2
e,3,4
cp,1,ux,2,3
cp,2,uy,2,3
cp,3,uz,2,3
cp,4,rotx,2,3
cp,5,roty,2,3
finish
/solv
d,1,all
d,5,all
d,4,ux,,
d,4,uy,,
f,6,fy,-1000
f,7,fy,-1000
solv
finish
/post1
prnsol,u,sum
/eshape,1
plnsol,u,y
finish
FINISH
! /EXIT,NOSAV
/BATCH
/COM,ANSYS RELEASE Release 19.0      BUILD 19.0      UP20171214       22:15:19
/input,menust,tmp,''
/GST,ON
/PLO,INFO,3
/GRO,CURL,ON
/CPLANE,1
WPSTYLE,,,,,,,,0
/prep7
et,1,beam188
keyopt,1,3,3
mp,ex,1,2.1e5
mp,nuxy,1,0.285
sectype,1,beam,rect
secdata,100,40
sectype,2,beam,ctube
secdata,5,10
n,1,-2000
n,2,
n,3,
n,4,,2000
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secnum,2
e,3,4
cp,1,ux,2,3
cp,2,uy,2,3
cp,3,uz,2,3
cp,4,rotx,2,3
cp,5,roty,2,3
finish
/solv
d,1,all
d,5,all
d,4,ux,,
d,4,uy,,
f,6,fy,-1000
f,7,fy,-1000
solv
finish
/post1
prnsol,u,sum
/eshape,1
plnsol,u,y
finish
/prep7
et,1,beam188
keyopt,1,3,3
mp,ex,1,2.1e5
mp,nuxy,1,0.285
sectype,1,beam,rect
secdata,100,40
sectype,2,beam,ctube
secdata,5,10
n,1,-2000
n,2,
n,3,
n,4,,2000
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secnum,2
e,3,4
cp,1,ux,2,3
cp,2,uy,2,3
cp,3,uz,2,3
cp,4,rotx,2,3
cp,5,roty,2,3
finish
/solv
d,1,all
d,5,all
d,4,ux,,
d,4,uy,,
f,6,fy,-1000
f,7,fy,-1000
solv
finish
/post1
prnsol,u,sum
/eshape,1
plnsol,u,y
finish
SAVE
SAVE
SAVE
RESUME
/COM,ANSYS RELEASE Release 19.0      BUILD 19.0      UP20171214       22:35:28
/POST1
RESUME
/COM,ANSYS RELEASE Release 19.0      BUILD 19.0      UP20171214       22:35:36
/EFACET,1
PLNSOL, S,X, 0,1.0
/EFACET,1
PLNSOL, S,Y, 0,1.0
/EFACET,1
PLNSOL, S,Z, 0,1.0
/EFACET,1
PLNSOL, S,INT, 0,1.0
PLESOL, S,X, 0,1.0
RESUME
/COM,ANSYS RELEASE Release 19.0      BUILD 19.0      UP20171214       22:38:29
PLETAB, ,NOAV
PLETAB, ,NOAV
PLETAB, ,NOAV
RESUME
/COM,ANSYS RELEASE Release 19.0      BUILD 19.0      UP20171214       22:39:45
PLESOL, S,X, 0,1.0
PLESOL, S,Y, 0,1.0
PLESOL, S,Z, 0,1.0
PLESOL, S,X, 0,1.0
/EFACET,1
PLNSOL, S,X, 0,1.0
PLESOL, S,X, 0,1.0
PRETAB,
AVPRIN,0, ,
ETABLE, ,SMISC, 3
ETABLE,REFL
AVPRIN,0, ,
ETABLE, ,SMISC, 16
PLETAB,SMIS3,NOAV
PLETAB,SMIS16,NOAV
AVPRIN,0, ,
ETABLE, ,SMISC, 6
AVPRIN,0, ,
ETABLE, ,SMISC, 12
PRETAB,SMIS16
PLETAB,SMIS16,NOAV
PLETAB,SMIS6,NOAV
PLETAB,SMIS12,NOAV
AVPRIN,0, ,
ETABLE, ,SMISC, 14
PLETAB,SMIS14,NOAV
PLETAB,SMIS14,AVG
PLLS,SMIS3,SMIS14,1,0,0
PLLS,SMIS6,SMIS12,1,0,0
RESUME
/COM,ANSYS RELEASE Release 19.0      BUILD 19.0      UP20171214       22:53:03
PLLS,0,0,1,0,0
AVPRIN,0, ,
ETABLE, ,SMISC, 3
AVPRIN,0, ,
ETABLE, ,SMISC, 16
PLLS,SMIS3,SMIS3,1,0,0
PLLS,SMIS3,SMIS16,1,0,0
PLESOL, S,EQV, 0,1.0
PLLS,SMIS16,SMIS3,1,0,0
PLLS,SMIS3,SMIS16,1,0,0
/EFACET,1
PLNSOL, S,X, 0,1.0
/EFACET,1
PLNSOL, NL,HPRES, 0,1.0
PLESOL, S,X, 0,1.0
PLESOL, S,XY, 0,1.0
PLESOL, S,1, 0,1.0
PLESOL, S,INT, 0,1.0
PLESOL, S,EQV, 0,1.0
PLESOL, NL,SEPL, 0,1.0
PLESOL, S,X, 0,1.0
FINISH
! /EXIT,ALL
